y(x) := x^3 - x
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y5(x) := e^x
y3(x) := sinh(x)
y4(x) := ln(x)
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z(x) := x^3*cos(x)^2
z(x) := ln(x)/x
c_(x) := limit(y(x)/x, x → ∞)*x + limit(y(x) - x, x → ∞) → x*∞ + ∞
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b(x) := 0
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